freq[0] := 500  # Гц
amp[0] := 20
freqr[0] := 500  # disabled
NS := 5000
NF := 12
ampf(f) :=
    amp ← 0 if f < 100
    ampt ← 1 if 100 ≤ f ≤ 500
    ampt ← 1/f*500 if 500 < f < 1000
    ampt ← 0.5 if 1500 ≥ f ≥ 1000
    ampt ← 0 if f > 1500
    return ampt  # disabled
freq[1] := 502  # Гц
amp[1] := 18
freqr[1] := 512  # disabled
dfreq := 10000
freq[2] := 504  # Гц
amp[2] := 16
freqr[2] := 513  # disabled
dtime := 1/dfreq = 0.0001
freq[3] := 506  # Гц
amp[3] := 14
freqr[3] := 514  # disabled
dn := dfreq/NS = 2
freq[4] := 508  # Гц
amp[4] := 12
freqr[4] := 515  # disabled
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i := 0, 1 .. NS
freq[5] := 510  # Гц
amp[5] := 10
freqr[5] := 516  # disabled
ns[i] := 1 + i
freq[6] := 512  # Гц
amp[6] := 9
freqr[6] := 517  # disabled
time[i] := ns[i]*dtime
freq[7] := 514  # Гц
amp[7] := 7
freqr[7] := 518  # disabled
freq[8] := 516  # Гц
amp[8] := 5
freqr[8] := 519  # disabled
freq[9] := 518  # Гц
amp[9] := 3
freqr[9] := 520  # disabled
freq[10] := 520  # Гц
amp[10] := 3
freqr[10] := 521  # disabled
freq[11] := 522  # Гц
amp[11] := 3
freqr[11] := 522  # disabled
freq[12] := 524  # Гц
amp[12] := 3
freqr[12] := 523  # disabled
ifreqf := 0, 1 .. 500  # disabled
freqf[ifreqf] := ifreqf*10  # disabled
freq[13] := 526  # Гц
amp[13] := 1
freqr[13] := 524  # disabled
f(x) := sum(ampf(freqf[i])*(cos(2*π*freqf[i]*x) + 1), i = 0 .. 500 - 1)  # disabled
f(x) := sum(amp[i]*(cos(2*π*freq[i]*x) + 1), i = 0 .. NF - 1)
s[i] := f(time[i])
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sc := ceil(s)
logFreq(amp) :=
    for iii ∈ 0, 1 .. NF - 1
        v[iii] ← 0 if amp[iii] == 0
        v[iii] ← 1 otherwise
    return v
S(freq) :=
    k ← round(freq/dn, 1)
    alpha ← 2*cos(2*π*k/NS)
    Wre ← cos(2*π*k/NS)
    Wim ← sin(2*π*k/NS)
    vm1 ← 0
    vm2 ← 0
    for iii ∈ 0, 1 .. NS - 1
        scp[iii] ← sc[iii]*13/256
        v[iii] ← scp[iii] + alpha*vm1 - vm2 if iii == 0
        v[iii] ← scp[iii] + alpha*v[iii - 1] - vm1 if iii == 1
        v[iii] ← scp[iii] + alpha*v[iii - 1] - v[iii - 2] otherwise
        iii ← iii + 1
    vWre ← v[NS - 1]*Wre - v[NS - 2]
    vWim ← v[NS - 1]*Wim
    S ← (vWre^2 + vWim^2)*(39.3939/NS)^2
    M[0] ← S
    M[1] ← v
    M[2] ← Wre
    M[3] ← Wim
    M[4] ← vWre
    M[5] ← vWim
    M[6] ← alpha
    return M
S(freq[0])[4] = 2414.57
cos(2*π*freq[0]/2/NS) = 0.951057
# [component: outputs vdata]
i := 0, 1 .. NF - 1
S[i] := S(freq[i])[0]
lF := logFreq(amp)
vdata = [399; 324; 255; 196; 144; 99; 80; 49; 24; 9; 9; 399; 324; 255; 196; 144; 99; 80; 49; 24; 9; 9]
amp = [20; 18; 16; 14; 12; 10; 9; 7; 5; 3; 3; 3; 3; 1]
round(sqrt(S), 0) = [20; 18; 16; 14; 12; 10; 9; 7; 5; 3; 3; 3]
sqrt(S) = [20.0029; 18.007; 16.0172; 14.0176; 12.0008; 10.0048; 9.00066; 6.9969; 5.01379; 3.00865; 3.00882; 2.99698]
amp = [20; 18; 16; 14; 12; 10; 9; 7; 5; 3; 3; 3; 3; 1]
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ceil(s) =  # no stored result
freq = [500; 502; 504; 506; 508; 510; 512; 514; 516; 518; 520; 522; 524; 526]
lF = [1; 1; 1; 1; 1; 1; 1; 1; 1; 1; 1; 1]
round(S, 0) = [400; 324; 257; 196; 144; 100; 81; 49; 25; 9; 9; 9]
# D:\Desktop\Study_now\SRW\GoertzelAlgorithm\src\sim\data\sample.csv
# D:\Desktop\Study_now\SRW\GoertzelAlgorithm\src\sim\data\freq.csv
# D:\Desktop\Study_now\SRW\GoertzelAlgorithm\src\sim\data\logic.csv
# D:\Desktop\Study_now\SRW\GoertzelAlgorithm\src\sim\data\data.csv
